# D0=0;
# M=4200;
# Mf=125;
# Mr=125;
# Kfs=120;
# Krs=180;
# Bf=25;
# Br=35;
# Kft=1100;
# Krt=1100;
# l=40000;
# Lf=55;
# Lr=65;
# v0=20;
# Ab=4;
# L=1;
D0 := 0
M := 4200
Mf := 125
Mr := 125
Kfs := 120
Krs := 180
Bf := 25
Br := 35
Kft := 1100
Krt := 1100
l := 40000
Lf := 55
Lr := 65
v0 := 20
Ab := 4
L := 1
[
    0, 1, 0, 0, 0, 0, 0, 0;
    -(Kfs + Krs)/M, -(Bf + Br)/M, Kfs/M, Bf/M, Krs/M, Br/M, (Krs*Lr - Kfs*Lf)/M, (Br*Lr - Bf*Lf)/M;
    0, 0, 0, 1, 0, 0, 0, 0;
    Kfs/Mf, Bf/Mf, -(Kfs + Kft)/Mf, -Bf/Mf, 0, 0, Kfs*Lf/Mf, Bf*Lf/Mf;
    0, 0, 0, 0, 0, 1, 0, 0;
    Krs/Mr, Br/Mr, 0, 0, -(Krs + Krt)/Mr, -Br/Mr, -Krs*Lr/Mr, -Br*Lr/Mr;
    0, 0, 0, 0, 0, 0, 0, 1;
    (Krs*Lr - Kfs*Lf)/l, (Br*Lr - Bf*Lf)/l, Kfs*Lf/l, Bf*Lf/l, -Krs*Lr/l, -Br*Lr/l, -(Kfs*Lf^2 + Krs*Lr^2)/l, -(Bf*Lf^2 + Br*Lr^2)/l
] → [
    0, 1, 0, 0, 0, 0, 0, 0;
    -1/14, -1/70, 1/35, 1/168, 3/70, 1/120, 17/14, 3/14;
    0, 0, 0, 1, 0, 0, 0, 0;
    24/25, 1/5, -244/25, -1/5, 0, 0, 264/5, 11;
    0, 0, 0, 0, 0, 1, 0, 0;
    36/25, 7/25, 0, 0, -256/25, -7/25, -468/5, -91/5;
    0, 0, 0, 0, 0, 0, 0, 1;
    51/400, 9/400, 33/200, 11/320, -117/400, -91/1600, -2247/80, -447/80
]
[0, 0; 0, 0; 0, 0; Kft/Mf, 0; 0, 0; 0, Kft/Mr; 0, 0; 0, 0] → [0, 0; 0, 0; 0, 0; 44/5, 0; 0, 0; 0, 44/5; 0, 0; 0, 0]
[1, 0, 0, 0, 0, 0, 0, 0; 0, 0, 1, 0, 0, 0, 0, 0; 0, 0, 0, 0, 1, 0, 0, 0; 0, 0, 0, 0, 0, 0, 1, 0] → [1, 0, 0, 0, 0, 0, 0, 0; 0, 0, 1, 0, 0, 0, 0, 0; 0, 0, 0, 0, 1, 0, 0, 0; 0, 0, 0, 0, 0, 0, 1, 0]
[0, 0; 0, 0; 0, 0; 0, 0]
